# SHIK Silica Sample Code

units           metal
atom_style      full

# 2 is Oxygen
# 1 is Silicon
processors      * * 1
read_data       out.${i}.data
mass            2 15.999
mass            1 28.085

group           gsi type 1 1
group           go type 2 2

compute         coord all  coord/atom cutoff  2.201
variable        uncoordination atom abs(c_coord<2)*(type==2) #+abs(c_coord-4)*(type==2)
variable        maxforce equal fmax
compute         uncoord all reduce sum v_uncoordination
variable        uncoord equal c_uncoord

# variable       t equal 330
# velocity       all create $t 87287
thermo          100
thermo_style    custom step temp pe fmax press lx ly xy pxx pyy pxy v_uncoord

#Pair Potentials
pair_style tersoff
pair_coeff * * SiO.tersoff Si O


dump 1 all custom 1000 dump.lammpstrj id type element x y z v_uncoordination
dump_modify   1 sort id element Si O

#fix holdem1 all restrain bond 7392 7391 20.0 20.0 3.1
#fix holdem2 all restrain bond 59232 59231 20.0 20.0 3.1

fix             lan all langevin 0.0 0.0 0.001 4447
fix             nve all nve

variable        Fconv equal 1e-3
fix             HALT all halt 1 v_maxforce < ${Fconv}  error continue
run            10000
unfix          HALT
unfix          lan
unfix          nve
#unfix          holdem1
#unfix          holdem2
velocity        all set 0.0 0.0 0.0
run             0
write_dump all custom out.tersoff.$i.lammpstrj id type element x y z v_uncoordination modify sort id element Si O
if "$(v_uncoord) != 0" then  "shell           touch $i_failed" "jump SELF quit"
#write_data out.tersoff.$i.data
variable a loop 1 5
label           opt

print          "##### OPT STEP ${a}"

fix 1 all box/relax x 0 y 0
minimize 0.0 1.0e-2 1000 100000
unfix 1

fix             lan all langevin 0.0 0.0 0.001 4447
fix             nve all nve
fix             HALT all halt 1 v_maxforce < ${Fconv}  error continue
run            10000
unfix          HALT
unfix          lan
unfix          nve

run            0
velocity        all set 0.0 0.0 0.0
next a
if "$(v_maxforce) > ${Fconv}" then "jump SELF opt"
if "$(v_uncoord) != 0" then 'shell           touch $i_failed' else "write_data out.tersoff.$i.data"
# write_data out.tersoff.${i}.data

label           quit
